*HEADING
Unilateral local boot-seat contact probe against an ideal fixed support block.
*NODE,NSET=SEAT
1,-36.0,-12.5,-14.6
2,-36.0,-16.5,-14.6
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*ELEMENT,TYPE=C3D4,ELSET=SEAT
1,1291,1337,463,1416
2,1024,373,1407,1427
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*NODE,NSET=SUPPORT
1527,-39,-19.5,-17
1528,-29,-19.5,-17
1529,-29,-9.5,-17
1530,-39,-9.5,-17
1531,-39,-19.5,-16
1532,-29,-19.5,-16
1533,-29,-9.5,-16
1534,-39,-9.5,-16
*ELEMENT,TYPE=C3D8,ELSET=SUPPORT
5106,1527,1528,1529,1530,1531,1532,1533,1534
*MATERIAL,NAME=SEAT
*ELASTIC
1120,.35
*SOLID SECTION,ELSET=SEAT,MATERIAL=SEAT
*MATERIAL,NAME=SUPPORT
*ELASTIC
1120,.35
*SOLID SECTION,ELSET=SUPPORT,MATERIAL=SUPPORT
*SURFACE,NAME=SLAVE,TYPE=ELEMENT
4699,S2
4569,S4
4622,S4
4754,S4
4711,S2
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2095,S1
*SURFACE,NAME=MASTER,TYPE=ELEMENT
SUPPORT,S2
*SURFACE INTERACTION,NAME=NORMAL
*SURFACE BEHAVIOR,PRESSURE-OVERCLOSURE=LINEAR
1000000.0
*CONTACT PAIR,INTERACTION=NORMAL,TYPE=SURFACE TO SURFACE
SLAVE,MASTER
*NSET,NSET=ANCHORS
267,35
*BOUNDARY
SUPPORT,1,3,0
267,1,2,0
35,2,2,0
*STEP,NLGEOM,INC=100
*STATIC
.1,1,1e-6,.1
*CLOAD
47,3,-0.254827766688948
465,3,-0.395422540775422
1,3,-0.183390560615046
56,3,-0.250859518303282
2,3,-0.121660663442619
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452,3,-0.159058535050758
*NODE PRINT,NSET=SUPPORT,TOTALS=ONLY
RF
*NODE PRINT,NSET=ANCHORS,TOTALS=ONLY
RF
*NODE PRINT,NSET=SEAT
U
*CONTACT PRINT,SLAVE=SLAVE,MASTER=MASTER
CF,CDIS,CSTR
*END STEP
