*HEADING
Balanced local boot/yoke contact with both actual cropped parts deformable.
*NODE,NSET=BOOT
1,-36.0,-12.5,-14.6
2,-36.0,-16.5,-14.6
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*ELEMENT,TYPE=C3D4,ELSET=BOOT
1,821,733,3586,3783
2,1127,3914,3531,4253
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*SURFACE,NAME=BOOT_CONTACT,TYPE=ELEMENT
14796,S1
15067,S3
16259,S4
16814,S3
16809,S3
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14548,S1
*NODE,NSET=YOKE
4469,-32.1,-14.5,-19.0
4470,-32.85,-14.5,-19.0
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*ELEMENT,TYPE=C3D4,ELSET=YOKE
17734,7228,7512,7953,8209
17735,7445,8051,7724,8431
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*SURFACE,NAME=YOKE_CONTACT,TYPE=ELEMENT
24747,S1
40132,S3
30671,S1
39534,S3
39533,S2
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33117,S1
*MATERIAL,NAME=BOOT
*ELASTIC
1120,.35
*SOLID SECTION,ELSET=BOOT,MATERIAL=BOOT
*MATERIAL,NAME=YOKE
*ELASTIC
1120,.35
*SOLID SECTION,ELSET=YOKE,MATERIAL=YOKE
*NSET,NSET=ANCHORS
29,9,4837,4481,4479
*SURFACE INTERACTION,NAME=NORMAL
*SURFACE BEHAVIOR,PRESSURE-OVERCLOSURE=LINEAR
1000000
*CONTACT PAIR,INTERACTION=NORMAL,TYPE=SURFACE TO SURFACE
BOOT_CONTACT,YOKE_CONTACT
*BOUNDARY
29,1,2,0
9,2,2,0
4837,1,3,0
4481,2,3,0
4479,3,3,0
*STEP,NLGEOM,INC=100
*STATIC
.1,1,1e-6,.1
*CLOAD
1,3,-0.0415728482674509
2,3,-0.0467799564060889
3,3,-0.0402162957038326
4,3,-0.0456231623055229
5,3,-0.0456417887053343
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4924,3,0.128583652979911
*NODE PRINT,NSET=ANCHORS,TOTALS=ONLY
RF
*NODE PRINT,NSET=BOOT
U
*NODE PRINT,NSET=YOKE
U
*CONTACT PRINT,SLAVE=BOOT_CONTACT,MASTER=YOKE_CONTACT
CF,CDIS,CSTR
*EL PRINT,ELSET=BOOT
S
*EL PRINT,ELSET=YOKE
S
*END STEP
