*HEADING
Balanced washer-pressure contact probe on current body and plate, not screw qualification.
*NODE,NSET=body
1,64,-64,0.65
2,64,-64,47.6
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*ELEMENT,TYPE=C3D4,ELSET=body
1,29,758,7660,4961
2,3733,16979,3795,3803
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*SURFACE,NAME=body__body_plate,TYPE=ELEMENT
15801,S1
47048,S1
49525,S2
48815,S2
48816,S2
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55953,S3
*SURFACE,NAME=body__body_washer_0,TYPE=ELEMENT
2084,S1
246,S1
54692,S1
57317,S4
43952,S1
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54563,S1
*SURFACE,NAME=body__body_washer_1,TYPE=ELEMENT
247,S1
11,S1
57507,S2
51262,S1
558,S1
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55074,S1
*SURFACE,NAME=body__body_washer_2,TYPE=ELEMENT
17930,S1
2994,S1
54600,S1
54276,S1
51513,S1
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54564,S2
*SURFACE,NAME=body__body_washer_3,TYPE=ELEMENT
146,S1
57863,S3
57445,S2
51263,S2
277,S1
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55073,S3
*NODE,NSET=rear_plate
20261,-64.2,-64,0.65
20262,-62.2,-64,0.65
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*ELEMENT,TYPE=C3D4,ELSET=rear_plate
58122,25903,20284,24847,22634
58123,20313,20312,24756,22287
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*SURFACE,NAME=rear_plate__body_plate,TYPE=ELEMENT
74498,S1
74121,S3
62756,S1
75936,S2
74510,S1
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60331,S4
*SURFACE,NAME=rear_plate__washer_plate_0,TYPE=ELEMENT
58414,S1
58362,S1
58440,S1
75236,S1
74692,S2
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74249,S2
*SURFACE,NAME=rear_plate__washer_plate_1,TYPE=ELEMENT
58571,S2
58516,S1
58470,S1
74200,S1
75297,S3
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74504,S4
*SURFACE,NAME=rear_plate__washer_plate_2,TYPE=ELEMENT
58863,S1
74183,S1
73578,S1
75148,S4
70937,S1
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63944,S1
*SURFACE,NAME=rear_plate__washer_plate_3,TYPE=ELEMENT
58239,S1
58137,S1
73984,S1
73035,S1
76471,S4
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71697,S1
*MATERIAL,NAME=body
*ELASTIC
1120,0.35
*SOLID SECTION,ELSET=body,MATERIAL=body
*MATERIAL,NAME=rear_plate
*ELASTIC
68300,0.33
*SOLID SECTION,ELSET=rear_plate,MATERIAL=rear_plate
*NSET,NSET=ANCHORS
1747,3679,3686,20464,20562
*SURFACE INTERACTION,NAME=NORMAL
*SURFACE BEHAVIOR,PRESSURE-OVERCLOSURE=LINEAR
100000.0
*CONTACT PAIR,INTERACTION=NORMAL,TYPE=SURFACE TO SURFACE
rear_plate__body_plate,body__body_plate
*BOUNDARY
3686,1,3,0
1747,1,1,0
1747,3,3,0
3679,1,1,0
20464,2,3,0
20562,3,3,0
*STEP,NLGEOM,INC=200
*STATIC
.05,1,1e-6,.1
*DLOAD
2084,P1,1.31082009397581
246,P1,1.31082009397581
54692,P1,1.31082009397581
57317,P4,1.31082009397581
43952,P1,1.31082009397581
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71697,P1,0.855674228011989
*NODE PRINT,NSET=ANCHORS
RF
*NODE PRINT,NSET=ANCHORS,TOTALS=ONLY
RF
*NODE FILE
U
*EL FILE
S
*CONTACT PRINT,SLAVE=rear_plate__body_plate,MASTER=body__body_plate
CF,CDIS,CSTR
*END STEP
