*HEADING
Local boss/spacer contact, minimum dimensional case; metal modulus is assumed.
*NODE,NSET=BOSS
1,37.925,6.0,-19.0
2,36.225,6.0,-19.0
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*ELEMENT,TYPE=C3D4,ELSET=BOSS
1,3596,3864,3383,4517
2,3454,3185,3516,3708
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*SURFACE,NAME=BOSS_CONTACT,TYPE=ELEMENT
9367,S1
9608,S1
16202,S1
16415,S3
23055,S2
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20555,S1
*NODE,NSET=SPACER
5347,37.925,6.0,-19.0
5348,36.225,6.0,-19.0
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*ELEMENT,TYPE=C3D4,ELSET=SPACER
23072,5678,5371,5370,5538
23073,6040,5852,6023,6183
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*SURFACE,NAME=SPACER_CONTACT,TYPE=ELEMENT
25270,S1
25691,S4
24017,S3
25665,S2
24893,S3
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25147,S1
*MATERIAL,NAME=BOSS
*ELASTIC
1120,.35
*SOLID SECTION,ELSET=BOSS,MATERIAL=BOSS
*MATERIAL,NAME=SPACER
*ELASTIC
193000,.3
*SOLID SECTION,ELSET=SPACER,MATERIAL=SPACER
*NSET,NSET=ANCHORS
10,8,5503,5353,5568
*SURFACE INTERACTION,NAME=NORMAL
*SURFACE BEHAVIOR,PRESSURE-OVERCLOSURE=LINEAR
1000000
*CONTACT PAIR,INTERACTION=NORMAL,TYPE=SURFACE TO SURFACE
BOSS_CONTACT,SPACER_CONTACT
*BOUNDARY
10,1,2,0
8,2,2,0
5503,1,3,0
5353,2,3,0
5568,3,3,0
*STEP,NLGEOM,INC=100
*STATIC
.1,1,1e-6,.1
*CLOAD
3,3,-0.106613117233612
4,3,-0.0990759933833161
5,3,-0.107228328301477
6,3,-0.107228328301477
7,3,-0.0415321870436606
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5898,3,0.250077853143026
*NODE PRINT,NSET=ANCHORS,TOTALS=YES
RF
*NODE PRINT,NSET=BOSS
U
*NODE PRINT,NSET=SPACER
U
*CONTACT PRINT,SLAVE=BOSS_CONTACT,MASTER=SPACER_CONTACT
CF,CDIS,CSTR
*EL PRINT,ELSET=BOSS
S
*EL PRINT,ELSET=SPACER
S
*END STEP
